*HEADING
Abaqus export from ScanIP+FE
Units: Millimetres (mm)
**==============================================================================
**MATERIAL DEFINITIONS BEGIN
**==============================================================================
**==============================================================================
**MATERIAL PLACEHOLDER BEGIN
**Shells: Sample with MIdde-In
**Shells Material: Sample with MIdde-In
*SHELL GENERAL SECTION, ELSET=SH_SAMPLE_WITH_MIDDE_IN, MATERIAL=SM_SAMPLE
0.5
*MATERIAL, NAME=SM_SAMPLE
**MATERIAL PLACEHOLDER END
**==============================================================================
**==============================================================================
**MATERIAL DEFINITIONS END
**==============================================================================
**==============================================================================
**CONTACT DEFINITIONS BEGIN
**==============================================================================
**==============================================================================
**CONTACT DEFINITIONS END
**==============================================================================
**==============================================================================
**NODE DATA BEGIN
**==============================================================================
*NODE
1, 4.259628355503e-001, 2.151031047106e-001, 0.000000000000e+000
2, 4.103627502918e-001, 2.219876646996e-001, 0.000000000000e+000
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**==============================================================================
**NODE DATA END
**==============================================================================
**==============================================================================
**SOLID ELEMENT DATA BEGIN
**==============================================================================
**==============================================================================
**SOLID ELEMENT DATA END
**==============================================================================
**==============================================================================
**SHELL ELEMENT DATA BEGIN
**==============================================================================
**==============================================================================
**SHELL ELEMENTS - Contact: Sample with MIdde-In BEGIN
**Shells Material: Sample with MIdde-In
**Material ID: SM_SAMPLE
**Material Index: 1
**==============================================================================
**SHELL ELEMENTS (TRIANGULAR) - Contact: Sample with MIdde-In BEGIN
*ELEMENT, TYPE=S3, ELSET=SH_SAMPLE_WITH_MIDDE_IN
174674,418,280,417
174675,6312,6314,6176
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**SHELL ELEMENTS (TRIANGULAR) - Contact: Sample with MIdde-In END
**==============================================================================
**SHELL ELEMENTS - Contact: Sample with MIdde-In END
**==============================================================================
**==============================================================================
**SHELL ELEMENT DATA END
**==============================================================================
**==============================================================================
**CONTACT SURFACE DATA BEGIN
**==============================================================================
**==============================================================================
**CONTACT SURFACE DATA END
**==============================================================================
